# Метод стрельбы
I0 := 100
r(x) := .1
ε(x) := 0.002
a(x) := 5
R := 1
D(x, y) := [-a(x)*y[0] + r(x)*y[1] + ε(x)*(y[0] + y[1]); a(x)*y[1] - r(x)*y[0] - ε(x)*(y[0] + y[1])*y[1]]
z[0] := 10
load(x1, z) := [100; z[0]]
score(x1, y) := R*y[0]*y[1]
I1 := sbval(z, 0, 1, D, load, score)
I1 = [1.01387]
S := rkfixed([I0; I1[0]], 0, 1, 20, D)
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