# Уравнение Пуассона
# с нулевыми граничными условиями
M := 32
F[M, M] := 0
F[15, 20] := 10^4
G := multigrid(-F, 2)
# [component: inputs G]
# [component: inputs G]
# multigrid(F,ncycle) — матрица решения уравнения Пуассона размера (M+1) (M+1)
# на квадратной области с нулевыми граничными условиями:
# - F — матрица размера (M+1) (M+1), задающая правую часть уравнения Пуассона;
# - ncycle — параметр численного алгоритма (количество циклов в пределах
# каждой итерации).
# -
