# Экстраполяция функцией предсказания
# predict(y,m,n) — функция предсказания вектора, экстраполирующего выборку
# данных:
# - y — вектор действительных значений, взятых через равные промежутки значений аргумента;
# - m — количество последовательных элементов вектора y, согласно которым строится экстраполяция;
# - n — количество элементов вектора предсказаний.
k := 100
j := 0 .. k
y[j] := e^(-j/100)*sin(j/10)
y := transpose([4.1, 2.4, 3, 4.3, 3.6, 5.2, 5.9])
k := rows(y) - 1
m := 5
n := 10
A := predict(y, m, n)
i := 0 .. n + k
j := 0 .. k
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