# Уравнение Пуассона  с произвольными граничными условиями
M := 32
F[M, M] := 0
F[25, 10] := 5
F[10, 10] := -5
F[15, 20] := 10
i := 0 .. M
k := 0 .. M
a[i, k] := 1
b := a
c := a
# relax(a,b,c,d,e,F,v,rjac) — матрица решения дифференциального уравнения в частных производных на квадратной области, полученного с помощью алгоритма релаксации для метода сеток:
d := a
e := -4*a
v[i, k] := 0
G := relax(a, b, c, d, e, -F, v, .95)
# [component: inputs G]
# - a,b,c,d,e — квадратные матрицы коэффициентов разностной схемы,  аппроксимирующей дифференциальное уравнение;
# - F — квадратная матрица, задающая правую часть дифференциального уравнения;
# - v — квадратная матрица граничных условий и начального приближения  к решению;
# - rjac — параметр численного алгоритма (спектральный радиус итераций Якоби).
