# Гистограммы с равными интервалами
N := 1000  # histogram(bin,x) — матрица гистограммы размера bin 2, состоящая из столбца сегментов разбиения и столбца частоты попадания в них данных:
bin := 10
x := rnorm(N, 0, 1)
f := histogram(bin, x)
# - bin — количество сегментов построения гистограммы;
# - x — вектор случайных данных.
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f = [
    -2.91637, 1;
    -2.2873, 21;
    -1.65823, 63;
    -1.02915, 144;
    -0.400081, 212;
    0.228991, 252;
    0.858064, 181;
    1.48714, 94;
    2.11621, 25;
    2.74528, 7
]
