# Гистограммы с произвольными интервалами
# hist(intvls,x) — вектор частоты попадания данных в интервалы гистограммы:
# - intvls — вектор, элементы которого задают сегменты построения гистограммы в порядке возрастания a intvlsi<b;
# - x — вектор случайных данных.
N := 1000
bin := 30
x := rnorm(N, 0, 1)
lower := floor(min(x))
upper := ceil(max(x))
h := (upper - lower)/bin
j := 0 .. bin
int[j] := lower + h*j
f := 1/(N*h)*hist(int, x)
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