# Решение уравнения диффузии тепла  при помощи функции relax
M := 16
C := 0.9
i := 0 .. M
k := 0 .. M
a[i, k] := C/2
b[i, k] := C/2
c[i, k] := 0
d[i, k] := 1 - C
e[i, k] := -1
F[i, k] := 0
v[i, k] := 0
v[0, 5] := 1
G := relax(a, b, c, d, e, F, v, .5)
# [component: inputs G]
