# РАСПОЗНАВАНИЕ ОБРАЗОВ ПО КОЭФФИЦИЕНТУ КОРРЕЛЯЦИИ.
w := [9; 2; 5; 8]
v := [3; 7; 1; 4]
Mw := sum(w[i], i = 1 .. 4)/4  # error: Индекс массива является недопустимым для этого массива.
Mv := 1*sum(v[i], i = 1 .. 4)/4  # error: Индекс массива является недопустимым для этого массива.
Kvw := 1*sum(v[i] - Mv, i = 1 .. 4)*(v[i] - Mw)/4
δv := sqrt(sum((v[i] - Mv)^2, i = 1 .. 4)/4)
rvw := Kvw/(δv*δw)
δw := sqrt(sum((w[i] - Mw)^2, i = 1 .. 4)/4)
i := 1 .. 4
S1[:, i] := F1[i][:, 3]
S2[:, i] := F2[i][:, 3]
S3[:, i] := F3[i][:, 3]
S1[k, i] := str2num(S1[k, i])
S2(k, i) := str2num(S2[k, i])
k := 1 .. 7462
S3[k, i] := str2num(S3[k, i])  # error: Индекс массива является недопустимым для этого массива.
X[2] := [0, 1, 1, 0; 1, 0, 0, 1; 0, 0, 0, 1; 0, 0, 1, 0; 0, 1, 0, 0; 1, 0, 0, 0; 1, 0, 0, 1; 1, 1, 1, 1]
X[3] := [0, 1, 1, 0; 1, 0, 0, 1; 0, 0, 1, 0; 0, 1, 0, 0; 1, 1, 0, 0; 0, 0, 1, 0; 1, 0, 0, 1; 1, 1, 1, 0]
X[1] := [0, 0, 1, 1; 0, 1, 1, 1; 1, 1, 1, 1; 1, 0, 1, 1; 0, 0, 1, 1; 0, 0, 1, 1; 0, 0, 1, 1; 0, 0, 1, 1]
Y[:, j] := X[j][:, 3]
Y[k, j] := str2num(Y[k, j])
K :=
    for j ∈ 1 .. 3
        max[1] ← 0
        max[2] ← 0
        max[3] ← 0
        for k ∈ 1 .. 4
            μ1[k] ← corr(S11[:, k], Y[:, j])
            max[1] ← μ1k if μ1k > max[1]
            μ2[k] ← corr(S21[:, k], Y[:, j])
            max[2] ← μ2[k] if μ2[k] > max[2]
            μ3[k] ← corr(S31[:, k], Y[:, j])
            max[3] ← μ3[k] if μ3[k] > max[3]
            k
        MAX[j] ← 0
        for i ∈ 1 .. 3
            MAX[j] ← max[i] if MAX[j] < max[i]
            i
        for i ∈ 1 .. 3
            K[j] ← i if MAX[j] == max[i]
            i
        K[j] ← "76" if K[j] == 1
        K[j] ← "95" if K[j] == 2
        K[j] ← "98" if K[j] == 3
        j
    K
