# НЕЙРОННЫЕ СЕТИ. ПЕРСЕПТРОН.
OUT := 1/(1 + exp(-k*NET))  # error: Эта переменная не определена.
ORIGIN := -100
i := -30 .. 30
Σ[i] := 1.5*i
k1 := -10
k2 := 0.9
k3 := 0.1
a3[i] := 1/(1 + exp(-k3*Σ[i]))
a1[i] := if(Σ[i] ≤ k1, 0, 1)
a2[i] := (k2*Σ)[i]
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W :=
    D ← 2
    while D > 0
        Σ ← w1*x01 + w2*x02
        y ← 0 if Σ ≤ k
        y ← 1 otherwise
        D ← y0 - y
        w1 ← w1 + D*x01*η
        w2 ← w2 + D*x02*η
        D
    W ← w  # error: Эта переменная не определена.
ORIGIN := 1
η := 1
y0 := 1
kw := 10
i := 1 .. 2
x0 := rnd(5)
x02 := rnd(2)
x01 := 1.573
x02 := 0.773
w := [0; 0]
W := [6.292; 3.094]
y :=
    Σ ← W[1]*X01 + W[2]*x02
    y ← 0 if Σ ≤ k
    y ← 1 otherwise
    y  # error: Эта переменная не определена.
y := 1
j := 1 .. 10
x1[j] := rnd(-9)
x2[j] := rnd(9)
X1 := -10 .. 10
X2(X1) := -X1*W[1]/W[2]
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